/BATCH
/CLEAR,NOSTART
/CONFIG,RESUPREC,0
/TITLE,Open cylinder verification P10N16
/PREP7
CSYS,0
ET,1,PLANE183
KEYOPT,1,1,0
KEYOPT,1,3,1
KEYOPT,1,6,0
MP,EX,1,200000
MP,PRXY,1,0.3
TYPE,1
MAT,1
ESYS,0
N,1,750,0,0
N,2,751.875,0,0
N,3,753.75,0,0
N,4,755.625,0,0
N,5,757.5,0,0
N,6,759.375,0,0
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N,4833,810,240,0
EN,1,1,3,53,51,2,35,52,34
EN,2,3,5,55,53,4,36,54,35
EN,3,5,7,57,55,6,37,56,36
EN,4,7,9,59,57,8,38,58,37
EN,5,9,11,61,59,10,39,60,38
EN,6,11,13,63,61,12,40,62,39
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EN,1536,4781,4783,4833,4831,4782,4800,4832,4799
ALLSEL,ALL
CDWRITE,DB,model,cdb
/COM,OCV_MESH_BEGIN
NLIST,ALL
ELIST,ALL
ETLIST,ALL
MPLIST,ALL
/COM,OCV_MESH_END
FINISH
/SOLU
ANTYPE,STATIC
NLGEOM,OFF
AUTOTS,OFF
NSUBST,1,1,1
TIME,1
ERESX,YES
ALLSEL,ALL
D,1,UY,0
D,2,UY,0
D,3,UY,0
D,4,UY,0
D,5,UY,0
D,6,UY,0
D,7,UY,0
D,8,UY,0
D,9,UY,0
D,10,UY,0
D,11,UY,0
D,12,UY,0
D,13,UY,0
D,14,UY,0
D,15,UY,0
D,16,UY,0
D,17,UY,0
D,18,UY,0
D,19,UY,0
D,20,UY,0
D,21,UY,0
D,22,UY,0
D,23,UY,0
D,24,UY,0
D,25,UY,0
D,26,UY,0
D,27,UY,0
D,28,UY,0
D,29,UY,0
D,30,UY,0
D,31,UY,0
D,32,UY,0
D,33,UY,0
SFE,1,4,PRES,1,10,10
SFE,17,4,PRES,1,10,10
SFE,33,4,PRES,1,10,10
SFE,49,4,PRES,1,10,10
SFE,65,4,PRES,1,10,10
SFE,81,4,PRES,1,10,10
SFE,97,4,PRES,1,10,10
SFE,113,4,PRES,1,10,10
SFE,129,4,PRES,1,10,10
SFE,145,4,PRES,1,10,10
SFE,161,4,PRES,1,10,10
SFE,177,4,PRES,1,10,10
SFE,193,4,PRES,1,10,10
SFE,209,4,PRES,1,10,10
SFE,225,4,PRES,1,10,10
SFE,241,4,PRES,1,10,10
SFE,257,4,PRES,1,10,10
SFE,273,4,PRES,1,10,10
SFE,289,4,PRES,1,10,10
SFE,305,4,PRES,1,10,10
SFE,321,4,PRES,1,10,10
SFE,337,4,PRES,1,10,10
SFE,353,4,PRES,1,10,10
SFE,369,4,PRES,1,10,10
SFE,385,4,PRES,1,10,10
SFE,401,4,PRES,1,10,10
SFE,417,4,PRES,1,10,10
SFE,433,4,PRES,1,10,10
SFE,449,4,PRES,1,10,10
SFE,465,4,PRES,1,10,10
SFE,481,4,PRES,1,10,10
SFE,497,4,PRES,1,10,10
SFE,513,4,PRES,1,10,10
SFE,529,4,PRES,1,10,10
SFE,545,4,PRES,1,10,10
SFE,561,4,PRES,1,10,10
SFE,577,4,PRES,1,10,10
SFE,593,4,PRES,1,10,10
SFE,609,4,PRES,1,10,10
SFE,625,4,PRES,1,10,10
SFE,641,4,PRES,1,10,10
SFE,657,4,PRES,1,10,10
SFE,673,4,PRES,1,10,10
SFE,689,4,PRES,1,10,10
SFE,705,4,PRES,1,10,10
SFE,721,4,PRES,1,10,10
SFE,737,4,PRES,1,10,10
SFE,753,4,PRES,1,10,10
SFE,769,4,PRES,1,10,10
SFE,785,4,PRES,1,10,10
SFE,801,4,PRES,1,10,10
SFE,817,4,PRES,1,10,10
SFE,833,4,PRES,1,10,10
SFE,849,4,PRES,1,10,10
SFE,865,4,PRES,1,10,10
SFE,881,4,PRES,1,10,10
SFE,897,4,PRES,1,10,10
SFE,913,4,PRES,1,10,10
SFE,929,4,PRES,1,10,10
SFE,945,4,PRES,1,10,10
SFE,961,4,PRES,1,10,10
SFE,977,4,PRES,1,10,10
SFE,993,4,PRES,1,10,10
SFE,1009,4,PRES,1,10,10
SFE,1025,4,PRES,1,10,10
SFE,1041,4,PRES,1,10,10
SFE,1057,4,PRES,1,10,10
SFE,1073,4,PRES,1,10,10
SFE,1089,4,PRES,1,10,10
SFE,1105,4,PRES,1,10,10
SFE,1121,4,PRES,1,10,10
SFE,1137,4,PRES,1,10,10
SFE,1153,4,PRES,1,10,10
SFE,1169,4,PRES,1,10,10
SFE,1185,4,PRES,1,10,10
SFE,1201,4,PRES,1,10,10
SFE,1217,4,PRES,1,10,10
SFE,1233,4,PRES,1,10,10
SFE,1249,4,PRES,1,10,10
SFE,1265,4,PRES,1,10,10
SFE,1281,4,PRES,1,10,10
SFE,1297,4,PRES,1,10,10
SFE,1313,4,PRES,1,10,10
SFE,1329,4,PRES,1,10,10
SFE,1345,4,PRES,1,10,10
SFE,1361,4,PRES,1,10,10
SFE,1377,4,PRES,1,10,10
SFE,1393,4,PRES,1,10,10
SFE,1409,4,PRES,1,10,10
SFE,1425,4,PRES,1,10,10
SFE,1441,4,PRES,1,10,10
SFE,1457,4,PRES,1,10,10
SFE,1473,4,PRES,1,10,10
SFE,1489,4,PRES,1,10,10
SFE,1505,4,PRES,1,10,10
SFE,1521,4,PRES,1,10,10
/COM,OCV_OUTRES_BEGIN
OUTRES,ERASE
OUTRES,ALL,ALL
OUTRES,NAR,NONE
OUTRES,STAT
/COM,OCV_OUTRES_END
/COM,OCV_NERR_BEGIN
/NERR,STAT
/COM,OCV_NERR_END
ALLSEL,ALL
/COM,OCV_LOAD_AUDIT_BEGIN
SFELIST,ALL,ALL
FLIST,ALL
DLIST,ALL
FINISH
/CONFIG,STAT
/SOLU
SOLVE
FINISH
/CONFIG,STAT
/POST1
SET,1,1
/COM,OCV_SOLVED_STATE_BEGIN
/GRAPHICS,FULL
RSYS,0
ALLSEL,ALL
*GET,OCVPREN,NODE,0,COUNT
*GET,OCVPREE,ELEM,0,COUNT
*GET,OCVNSET,ACTIVE,0,SET,NSET
*GET,OCVLSTP,ACTIVE,0,SET,LSTP
*GET,OCVSBST,ACTIVE,0,SET,SBST
/COM,OCV_FORMAT_BEGIN
/FORMAT,8,E,24,16,100,240
/FORMAT,STAT
/COM,OCV_FORMAT_END
*CFOPEN,station_values,txt
*GET,OCVX,NODE,1201,LOC,X
*GET,OCVY,NODE,1201,LOC,Y
OCVQ=9.876543210123456E90
*GET,OCVQ,NODE,1201,S,X,ESOL
*VWRITE,'P10N16',1201,OCVX,OCVY,'SX',OCVQ
(A8,F8.0,2E24.16,A8,E24.16)
OCVQ=9.876543210123456E90
*GET,OCVQ,NODE,1201,S,Y,ESOL
*VWRITE,'P10N16',1201,OCVX,OCVY,'SY',OCVQ
(A8,F8.0,2E24.16,A8,E24.16)
OCVQ=9.876543210123456E90
*GET,OCVQ,NODE,1201,S,Z,ESOL
*VWRITE,'P10N16',1201,OCVX,OCVY,'SZ',OCVQ
(A8,F8.0,2E24.16,A8,E24.16)
OCVQ=9.876543210123456E90
*GET,OCVQ,NODE,1201,S,XY,ESOL
*VWRITE,'P10N16',1201,OCVX,OCVY,'SXY',OCVQ
(A8,F8.0,2E24.16,A8,E24.16)
OCVQ=9.876543210123456E90
*GET,OCVQ,NODE,1201,U,X
*VWRITE,'P10N16',1201,OCVX,OCVY,'UX',OCVQ
(A8,F8.0,2E24.16,A8,E24.16)
OCVQ=9.876543210123456E90
*GET,OCVQ,NODE,1201,U,Y
*VWRITE,'P10N16',1201,OCVX,OCVY,'UY',OCVQ
(A8,F8.0,2E24.16,A8,E24.16)
*GET,OCVX,NODE,1217,LOC,X
*GET,OCVY,NODE,1217,LOC,Y
OCVQ=9.876543210123456E90
*GET,OCVQ,NODE,1217,S,X,ESOL
*VWRITE,'P10N16',1217,OCVX,OCVY,'SX',OCVQ
(A8,F8.0,2E24.16,A8,E24.16)
OCVQ=9.876543210123456E90
*GET,OCVQ,NODE,1217,S,Y,ESOL
*VWRITE,'P10N16',1217,OCVX,OCVY,'SY',OCVQ
(A8,F8.0,2E24.16,A8,E24.16)
OCVQ=9.876543210123456E90
*GET,OCVQ,NODE,1217,S,Z,ESOL
*VWRITE,'P10N16',1217,OCVX,OCVY,'SZ',OCVQ
(A8,F8.0,2E24.16,A8,E24.16)
OCVQ=9.876543210123456E90
*GET,OCVQ,NODE,1217,S,XY,ESOL
*VWRITE,'P10N16',1217,OCVX,OCVY,'SXY',OCVQ
(A8,F8.0,2E24.16,A8,E24.16)
OCVQ=9.876543210123456E90
*GET,OCVQ,NODE,1217,U,X
*VWRITE,'P10N16',1217,OCVX,OCVY,'UX',OCVQ
(A8,F8.0,2E24.16,A8,E24.16)
OCVQ=9.876543210123456E90
*GET,OCVQ,NODE,1217,U,Y
*VWRITE,'P10N16',1217,OCVX,OCVY,'UY',OCVQ
(A8,F8.0,2E24.16,A8,E24.16)
*GET,OCVX,NODE,1233,LOC,X
*GET,OCVY,NODE,1233,LOC,Y
OCVQ=9.876543210123456E90
*GET,OCVQ,NODE,1233,S,X,ESOL
*VWRITE,'P10N16',1233,OCVX,OCVY,'SX',OCVQ
(A8,F8.0,2E24.16,A8,E24.16)
OCVQ=9.876543210123456E90
*GET,OCVQ,NODE,1233,S,Y,ESOL
*VWRITE,'P10N16',1233,OCVX,OCVY,'SY',OCVQ
(A8,F8.0,2E24.16,A8,E24.16)
OCVQ=9.876543210123456E90
*GET,OCVQ,NODE,1233,S,Z,ESOL
*VWRITE,'P10N16',1233,OCVX,OCVY,'SZ',OCVQ
(A8,F8.0,2E24.16,A8,E24.16)
OCVQ=9.876543210123456E90
*GET,OCVQ,NODE,1233,S,XY,ESOL
*VWRITE,'P10N16',1233,OCVX,OCVY,'SXY',OCVQ
(A8,F8.0,2E24.16,A8,E24.16)
OCVQ=9.876543210123456E90
*GET,OCVQ,NODE,1233,U,X
*VWRITE,'P10N16',1233,OCVX,OCVY,'UX',OCVQ
(A8,F8.0,2E24.16,A8,E24.16)
OCVQ=9.876543210123456E90
*GET,OCVQ,NODE,1233,U,Y
*VWRITE,'P10N16',1233,OCVX,OCVY,'UY',OCVQ
(A8,F8.0,2E24.16,A8,E24.16)
*GET,OCVX,NODE,2401,LOC,X
*GET,OCVY,NODE,2401,LOC,Y
OCVQ=9.876543210123456E90
*GET,OCVQ,NODE,2401,S,X,ESOL
*VWRITE,'P10N16',2401,OCVX,OCVY,'SX',OCVQ
(A8,F8.0,2E24.16,A8,E24.16)
OCVQ=9.876543210123456E90
*GET,OCVQ,NODE,2401,S,Y,ESOL
*VWRITE,'P10N16',2401,OCVX,OCVY,'SY',OCVQ
(A8,F8.0,2E24.16,A8,E24.16)
OCVQ=9.876543210123456E90
*GET,OCVQ,NODE,2401,S,Z,ESOL
*VWRITE,'P10N16',2401,OCVX,OCVY,'SZ',OCVQ
(A8,F8.0,2E24.16,A8,E24.16)
OCVQ=9.876543210123456E90
*GET,OCVQ,NODE,2401,S,XY,ESOL
*VWRITE,'P10N16',2401,OCVX,OCVY,'SXY',OCVQ
(A8,F8.0,2E24.16,A8,E24.16)
OCVQ=9.876543210123456E90
*GET,OCVQ,NODE,2401,U,X
*VWRITE,'P10N16',2401,OCVX,OCVY,'UX',OCVQ
(A8,F8.0,2E24.16,A8,E24.16)
OCVQ=9.876543210123456E90
*GET,OCVQ,NODE,2401,U,Y
*VWRITE,'P10N16',2401,OCVX,OCVY,'UY',OCVQ
(A8,F8.0,2E24.16,A8,E24.16)
*GET,OCVX,NODE,2417,LOC,X
*GET,OCVY,NODE,2417,LOC,Y
OCVQ=9.876543210123456E90
*GET,OCVQ,NODE,2417,S,X,ESOL
*VWRITE,'P10N16',2417,OCVX,OCVY,'SX',OCVQ
(A8,F8.0,2E24.16,A8,E24.16)
OCVQ=9.876543210123456E90
*GET,OCVQ,NODE,2417,S,Y,ESOL
*VWRITE,'P10N16',2417,OCVX,OCVY,'SY',OCVQ
(A8,F8.0,2E24.16,A8,E24.16)
OCVQ=9.876543210123456E90
*GET,OCVQ,NODE,2417,S,Z,ESOL
*VWRITE,'P10N16',2417,OCVX,OCVY,'SZ',OCVQ
(A8,F8.0,2E24.16,A8,E24.16)
OCVQ=9.876543210123456E90
*GET,OCVQ,NODE,2417,S,XY,ESOL
*VWRITE,'P10N16',2417,OCVX,OCVY,'SXY',OCVQ
(A8,F8.0,2E24.16,A8,E24.16)
OCVQ=9.876543210123456E90
*GET,OCVQ,NODE,2417,U,X
*VWRITE,'P10N16',2417,OCVX,OCVY,'UX',OCVQ
(A8,F8.0,2E24.16,A8,E24.16)
OCVQ=9.876543210123456E90
*GET,OCVQ,NODE,2417,U,Y
*VWRITE,'P10N16',2417,OCVX,OCVY,'UY',OCVQ
(A8,F8.0,2E24.16,A8,E24.16)
*GET,OCVX,NODE,2433,LOC,X
*GET,OCVY,NODE,2433,LOC,Y
OCVQ=9.876543210123456E90
*GET,OCVQ,NODE,2433,S,X,ESOL
*VWRITE,'P10N16',2433,OCVX,OCVY,'SX',OCVQ
(A8,F8.0,2E24.16,A8,E24.16)
OCVQ=9.876543210123456E90
*GET,OCVQ,NODE,2433,S,Y,ESOL
*VWRITE,'P10N16',2433,OCVX,OCVY,'SY',OCVQ
(A8,F8.0,2E24.16,A8,E24.16)
OCVQ=9.876543210123456E90
*GET,OCVQ,NODE,2433,S,Z,ESOL
*VWRITE,'P10N16',2433,OCVX,OCVY,'SZ',OCVQ
(A8,F8.0,2E24.16,A8,E24.16)
OCVQ=9.876543210123456E90
*GET,OCVQ,NODE,2433,S,XY,ESOL
*VWRITE,'P10N16',2433,OCVX,OCVY,'SXY',OCVQ
(A8,F8.0,2E24.16,A8,E24.16)
OCVQ=9.876543210123456E90
*GET,OCVQ,NODE,2433,U,X
*VWRITE,'P10N16',2433,OCVX,OCVY,'UX',OCVQ
(A8,F8.0,2E24.16,A8,E24.16)
OCVQ=9.876543210123456E90
*GET,OCVQ,NODE,2433,U,Y
*VWRITE,'P10N16',2433,OCVX,OCVY,'UY',OCVQ
(A8,F8.0,2E24.16,A8,E24.16)
*GET,OCVX,NODE,3601,LOC,X
*GET,OCVY,NODE,3601,LOC,Y
OCVQ=9.876543210123456E90
*GET,OCVQ,NODE,3601,S,X,ESOL
*VWRITE,'P10N16',3601,OCVX,OCVY,'SX',OCVQ
(A8,F8.0,2E24.16,A8,E24.16)
OCVQ=9.876543210123456E90
*GET,OCVQ,NODE,3601,S,Y,ESOL
*VWRITE,'P10N16',3601,OCVX,OCVY,'SY',OCVQ
(A8,F8.0,2E24.16,A8,E24.16)
OCVQ=9.876543210123456E90
*GET,OCVQ,NODE,3601,S,Z,ESOL
*VWRITE,'P10N16',3601,OCVX,OCVY,'SZ',OCVQ
(A8,F8.0,2E24.16,A8,E24.16)
OCVQ=9.876543210123456E90
*GET,OCVQ,NODE,3601,S,XY,ESOL
*VWRITE,'P10N16',3601,OCVX,OCVY,'SXY',OCVQ
(A8,F8.0,2E24.16,A8,E24.16)
OCVQ=9.876543210123456E90
*GET,OCVQ,NODE,3601,U,X
*VWRITE,'P10N16',3601,OCVX,OCVY,'UX',OCVQ
(A8,F8.0,2E24.16,A8,E24.16)
OCVQ=9.876543210123456E90
*GET,OCVQ,NODE,3601,U,Y
*VWRITE,'P10N16',3601,OCVX,OCVY,'UY',OCVQ
(A8,F8.0,2E24.16,A8,E24.16)
*GET,OCVX,NODE,3617,LOC,X
*GET,OCVY,NODE,3617,LOC,Y
OCVQ=9.876543210123456E90
*GET,OCVQ,NODE,3617,S,X,ESOL
*VWRITE,'P10N16',3617,OCVX,OCVY,'SX',OCVQ
(A8,F8.0,2E24.16,A8,E24.16)
OCVQ=9.876543210123456E90
*GET,OCVQ,NODE,3617,S,Y,ESOL
*VWRITE,'P10N16',3617,OCVX,OCVY,'SY',OCVQ
(A8,F8.0,2E24.16,A8,E24.16)
OCVQ=9.876543210123456E90
*GET,OCVQ,NODE,3617,S,Z,ESOL
*VWRITE,'P10N16',3617,OCVX,OCVY,'SZ',OCVQ
(A8,F8.0,2E24.16,A8,E24.16)
OCVQ=9.876543210123456E90
*GET,OCVQ,NODE,3617,S,XY,ESOL
*VWRITE,'P10N16',3617,OCVX,OCVY,'SXY',OCVQ
(A8,F8.0,2E24.16,A8,E24.16)
OCVQ=9.876543210123456E90
*GET,OCVQ,NODE,3617,U,X
*VWRITE,'P10N16',3617,OCVX,OCVY,'UX',OCVQ
(A8,F8.0,2E24.16,A8,E24.16)
OCVQ=9.876543210123456E90
*GET,OCVQ,NODE,3617,U,Y
*VWRITE,'P10N16',3617,OCVX,OCVY,'UY',OCVQ
(A8,F8.0,2E24.16,A8,E24.16)
*GET,OCVX,NODE,3633,LOC,X
*GET,OCVY,NODE,3633,LOC,Y
OCVQ=9.876543210123456E90
*GET,OCVQ,NODE,3633,S,X,ESOL
*VWRITE,'P10N16',3633,OCVX,OCVY,'SX',OCVQ
(A8,F8.0,2E24.16,A8,E24.16)
OCVQ=9.876543210123456E90
*GET,OCVQ,NODE,3633,S,Y,ESOL
*VWRITE,'P10N16',3633,OCVX,OCVY,'SY',OCVQ
(A8,F8.0,2E24.16,A8,E24.16)
OCVQ=9.876543210123456E90
*GET,OCVQ,NODE,3633,S,Z,ESOL
*VWRITE,'P10N16',3633,OCVX,OCVY,'SZ',OCVQ
(A8,F8.0,2E24.16,A8,E24.16)
OCVQ=9.876543210123456E90
*GET,OCVQ,NODE,3633,S,XY,ESOL
*VWRITE,'P10N16',3633,OCVX,OCVY,'SXY',OCVQ
(A8,F8.0,2E24.16,A8,E24.16)
OCVQ=9.876543210123456E90
*GET,OCVQ,NODE,3633,U,X
*VWRITE,'P10N16',3633,OCVX,OCVY,'UX',OCVQ
(A8,F8.0,2E24.16,A8,E24.16)
OCVQ=9.876543210123456E90
*GET,OCVQ,NODE,3633,U,Y
*VWRITE,'P10N16',3633,OCVX,OCVY,'UY',OCVQ
(A8,F8.0,2E24.16,A8,E24.16)
*CFCLOS
/COM,OCV_PRESOL_BEGIN
PRESOL,S,COMP
/COM,OCV_PRESOL_END
NSEL,NONE
NSEL,A,NODE,,1201
NSEL,A,NODE,,1217
NSEL,A,NODE,,1233
NSEL,A,NODE,,2401
NSEL,A,NODE,,2417
NSEL,A,NODE,,2433
NSEL,A,NODE,,3601
NSEL,A,NODE,,3617
NSEL,A,NODE,,3633
*GET,OCVLISTN,NODE,0,COUNT
*GET,OCVLISTE,ELEM,0,COUNT
/COM,OCV_STRESS_BEGIN
PRNSOL,S,COMP,,,,,ESOL
/COM,OCV_STRESS_END
/COM,OCV_DISP_BEGIN
PRNSOL,U,COMP
/COM,OCV_DISP_END
NSEL,ALL
*GET,OCVPOSTN,NODE,0,COUNT
*GET,OCVPOSTE,ELEM,0,COUNT
NSEL,NONE
NSEL,A,NODE,,1
NSEL,A,NODE,,2
NSEL,A,NODE,,3
NSEL,A,NODE,,4
NSEL,A,NODE,,5
NSEL,A,NODE,,6
NSEL,A,NODE,,7
NSEL,A,NODE,,8
NSEL,A,NODE,,9
NSEL,A,NODE,,10
NSEL,A,NODE,,11
NSEL,A,NODE,,12
NSEL,A,NODE,,13
NSEL,A,NODE,,14
NSEL,A,NODE,,15
NSEL,A,NODE,,16
NSEL,A,NODE,,17
NSEL,A,NODE,,18
NSEL,A,NODE,,19
NSEL,A,NODE,,20
NSEL,A,NODE,,21
NSEL,A,NODE,,22
NSEL,A,NODE,,23
NSEL,A,NODE,,24
NSEL,A,NODE,,25
NSEL,A,NODE,,26
NSEL,A,NODE,,27
NSEL,A,NODE,,28
NSEL,A,NODE,,29
NSEL,A,NODE,,30
NSEL,A,NODE,,31
NSEL,A,NODE,,32
NSEL,A,NODE,,33
/COM,OCV_SUPPORT_BEGIN
PRRSOL,F
/COM,OCV_SUPPORT_END
*CFOPEN,support_reactions,txt
*GET,OCVX,NODE,1,LOC,X
*GET,OCVY,NODE,1,LOC,Y
OCVQ=9.876543210123456E90
*GET,OCVQ,NODE,1,RF,FY
*VWRITE,'P10N16',1,OCVX,OCVY,'RFY',OCVQ
(A8,F8.0,2E24.16,A8,E24.16)
*GET,OCVX,NODE,2,LOC,X
*GET,OCVY,NODE,2,LOC,Y
OCVQ=9.876543210123456E90
*GET,OCVQ,NODE,2,RF,FY
*VWRITE,'P10N16',2,OCVX,OCVY,'RFY',OCVQ
(A8,F8.0,2E24.16,A8,E24.16)
*GET,OCVX,NODE,3,LOC,X
*GET,OCVY,NODE,3,LOC,Y
OCVQ=9.876543210123456E90
*GET,OCVQ,NODE,3,RF,FY
*VWRITE,'P10N16',3,OCVX,OCVY,'RFY',OCVQ
(A8,F8.0,2E24.16,A8,E24.16)
*GET,OCVX,NODE,4,LOC,X
*GET,OCVY,NODE,4,LOC,Y
OCVQ=9.876543210123456E90
*GET,OCVQ,NODE,4,RF,FY
*VWRITE,'P10N16',4,OCVX,OCVY,'RFY',OCVQ
(A8,F8.0,2E24.16,A8,E24.16)
*GET,OCVX,NODE,5,LOC,X
*GET,OCVY,NODE,5,LOC,Y
OCVQ=9.876543210123456E90
*GET,OCVQ,NODE,5,RF,FY
*VWRITE,'P10N16',5,OCVX,OCVY,'RFY',OCVQ
(A8,F8.0,2E24.16,A8,E24.16)
*GET,OCVX,NODE,6,LOC,X
*GET,OCVY,NODE,6,LOC,Y
OCVQ=9.876543210123456E90
*GET,OCVQ,NODE,6,RF,FY
*VWRITE,'P10N16',6,OCVX,OCVY,'RFY',OCVQ
(A8,F8.0,2E24.16,A8,E24.16)
*GET,OCVX,NODE,7,LOC,X
*GET,OCVY,NODE,7,LOC,Y
OCVQ=9.876543210123456E90
*GET,OCVQ,NODE,7,RF,FY
*VWRITE,'P10N16',7,OCVX,OCVY,'RFY',OCVQ
(A8,F8.0,2E24.16,A8,E24.16)
*GET,OCVX,NODE,8,LOC,X
*GET,OCVY,NODE,8,LOC,Y
OCVQ=9.876543210123456E90
*GET,OCVQ,NODE,8,RF,FY
*VWRITE,'P10N16',8,OCVX,OCVY,'RFY',OCVQ
(A8,F8.0,2E24.16,A8,E24.16)
*GET,OCVX,NODE,9,LOC,X
*GET,OCVY,NODE,9,LOC,Y
OCVQ=9.876543210123456E90
*GET,OCVQ,NODE,9,RF,FY
*VWRITE,'P10N16',9,OCVX,OCVY,'RFY',OCVQ
(A8,F8.0,2E24.16,A8,E24.16)
*GET,OCVX,NODE,10,LOC,X
*GET,OCVY,NODE,10,LOC,Y
OCVQ=9.876543210123456E90
*GET,OCVQ,NODE,10,RF,FY
*VWRITE,'P10N16',10,OCVX,OCVY,'RFY',OCVQ
(A8,F8.0,2E24.16,A8,E24.16)
*GET,OCVX,NODE,11,LOC,X
*GET,OCVY,NODE,11,LOC,Y
OCVQ=9.876543210123456E90
*GET,OCVQ,NODE,11,RF,FY
*VWRITE,'P10N16',11,OCVX,OCVY,'RFY',OCVQ
(A8,F8.0,2E24.16,A8,E24.16)
*GET,OCVX,NODE,12,LOC,X
*GET,OCVY,NODE,12,LOC,Y
OCVQ=9.876543210123456E90
*GET,OCVQ,NODE,12,RF,FY
*VWRITE,'P10N16',12,OCVX,OCVY,'RFY',OCVQ
(A8,F8.0,2E24.16,A8,E24.16)
*GET,OCVX,NODE,13,LOC,X
*GET,OCVY,NODE,13,LOC,Y
OCVQ=9.876543210123456E90
*GET,OCVQ,NODE,13,RF,FY
*VWRITE,'P10N16',13,OCVX,OCVY,'RFY',OCVQ
(A8,F8.0,2E24.16,A8,E24.16)
*GET,OCVX,NODE,14,LOC,X
*GET,OCVY,NODE,14,LOC,Y
OCVQ=9.876543210123456E90
*GET,OCVQ,NODE,14,RF,FY
*VWRITE,'P10N16',14,OCVX,OCVY,'RFY',OCVQ
(A8,F8.0,2E24.16,A8,E24.16)
*GET,OCVX,NODE,15,LOC,X
*GET,OCVY,NODE,15,LOC,Y
OCVQ=9.876543210123456E90
*GET,OCVQ,NODE,15,RF,FY
*VWRITE,'P10N16',15,OCVX,OCVY,'RFY',OCVQ
(A8,F8.0,2E24.16,A8,E24.16)
*GET,OCVX,NODE,16,LOC,X
*GET,OCVY,NODE,16,LOC,Y
OCVQ=9.876543210123456E90
*GET,OCVQ,NODE,16,RF,FY
*VWRITE,'P10N16',16,OCVX,OCVY,'RFY',OCVQ
(A8,F8.0,2E24.16,A8,E24.16)
*GET,OCVX,NODE,17,LOC,X
*GET,OCVY,NODE,17,LOC,Y
OCVQ=9.876543210123456E90
*GET,OCVQ,NODE,17,RF,FY
*VWRITE,'P10N16',17,OCVX,OCVY,'RFY',OCVQ
(A8,F8.0,2E24.16,A8,E24.16)
*GET,OCVX,NODE,18,LOC,X
*GET,OCVY,NODE,18,LOC,Y
OCVQ=9.876543210123456E90
*GET,OCVQ,NODE,18,RF,FY
*VWRITE,'P10N16',18,OCVX,OCVY,'RFY',OCVQ
(A8,F8.0,2E24.16,A8,E24.16)
*GET,OCVX,NODE,19,LOC,X
*GET,OCVY,NODE,19,LOC,Y
OCVQ=9.876543210123456E90
*GET,OCVQ,NODE,19,RF,FY
*VWRITE,'P10N16',19,OCVX,OCVY,'RFY',OCVQ
(A8,F8.0,2E24.16,A8,E24.16)
*GET,OCVX,NODE,20,LOC,X
*GET,OCVY,NODE,20,LOC,Y
OCVQ=9.876543210123456E90
*GET,OCVQ,NODE,20,RF,FY
*VWRITE,'P10N16',20,OCVX,OCVY,'RFY',OCVQ
(A8,F8.0,2E24.16,A8,E24.16)
*GET,OCVX,NODE,21,LOC,X
*GET,OCVY,NODE,21,LOC,Y
OCVQ=9.876543210123456E90
*GET,OCVQ,NODE,21,RF,FY
*VWRITE,'P10N16',21,OCVX,OCVY,'RFY',OCVQ
(A8,F8.0,2E24.16,A8,E24.16)
*GET,OCVX,NODE,22,LOC,X
*GET,OCVY,NODE,22,LOC,Y
OCVQ=9.876543210123456E90
*GET,OCVQ,NODE,22,RF,FY
*VWRITE,'P10N16',22,OCVX,OCVY,'RFY',OCVQ
(A8,F8.0,2E24.16,A8,E24.16)
*GET,OCVX,NODE,23,LOC,X
*GET,OCVY,NODE,23,LOC,Y
OCVQ=9.876543210123456E90
*GET,OCVQ,NODE,23,RF,FY
*VWRITE,'P10N16',23,OCVX,OCVY,'RFY',OCVQ
(A8,F8.0,2E24.16,A8,E24.16)
*GET,OCVX,NODE,24,LOC,X
*GET,OCVY,NODE,24,LOC,Y
OCVQ=9.876543210123456E90
*GET,OCVQ,NODE,24,RF,FY
*VWRITE,'P10N16',24,OCVX,OCVY,'RFY',OCVQ
(A8,F8.0,2E24.16,A8,E24.16)
*GET,OCVX,NODE,25,LOC,X
*GET,OCVY,NODE,25,LOC,Y
OCVQ=9.876543210123456E90
*GET,OCVQ,NODE,25,RF,FY
*VWRITE,'P10N16',25,OCVX,OCVY,'RFY',OCVQ
(A8,F8.0,2E24.16,A8,E24.16)
*GET,OCVX,NODE,26,LOC,X
*GET,OCVY,NODE,26,LOC,Y
OCVQ=9.876543210123456E90
*GET,OCVQ,NODE,26,RF,FY
*VWRITE,'P10N16',26,OCVX,OCVY,'RFY',OCVQ
(A8,F8.0,2E24.16,A8,E24.16)
*GET,OCVX,NODE,27,LOC,X
*GET,OCVY,NODE,27,LOC,Y
OCVQ=9.876543210123456E90
*GET,OCVQ,NODE,27,RF,FY
*VWRITE,'P10N16',27,OCVX,OCVY,'RFY',OCVQ
(A8,F8.0,2E24.16,A8,E24.16)
*GET,OCVX,NODE,28,LOC,X
*GET,OCVY,NODE,28,LOC,Y
OCVQ=9.876543210123456E90
*GET,OCVQ,NODE,28,RF,FY
*VWRITE,'P10N16',28,OCVX,OCVY,'RFY',OCVQ
(A8,F8.0,2E24.16,A8,E24.16)
*GET,OCVX,NODE,29,LOC,X
*GET,OCVY,NODE,29,LOC,Y
OCVQ=9.876543210123456E90
*GET,OCVQ,NODE,29,RF,FY
*VWRITE,'P10N16',29,OCVX,OCVY,'RFY',OCVQ
(A8,F8.0,2E24.16,A8,E24.16)
*GET,OCVX,NODE,30,LOC,X
*GET,OCVY,NODE,30,LOC,Y
OCVQ=9.876543210123456E90
*GET,OCVQ,NODE,30,RF,FY
*VWRITE,'P10N16',30,OCVX,OCVY,'RFY',OCVQ
(A8,F8.0,2E24.16,A8,E24.16)
*GET,OCVX,NODE,31,LOC,X
*GET,OCVY,NODE,31,LOC,Y
OCVQ=9.876543210123456E90
*GET,OCVQ,NODE,31,RF,FY
*VWRITE,'P10N16',31,OCVX,OCVY,'RFY',OCVQ
(A8,F8.0,2E24.16,A8,E24.16)
*GET,OCVX,NODE,32,LOC,X
*GET,OCVY,NODE,32,LOC,Y
OCVQ=9.876543210123456E90
*GET,OCVQ,NODE,32,RF,FY
*VWRITE,'P10N16',32,OCVX,OCVY,'RFY',OCVQ
(A8,F8.0,2E24.16,A8,E24.16)
*GET,OCVX,NODE,33,LOC,X
*GET,OCVY,NODE,33,LOC,Y
OCVQ=9.876543210123456E90
*GET,OCVQ,NODE,33,RF,FY
*VWRITE,'P10N16',33,OCVX,OCVY,'RFY',OCVQ
(A8,F8.0,2E24.16,A8,E24.16)
*CFCLOS
NSEL,ALL
*CFOPEN,state_values,txt
*VWRITE,'P10N16',0,0,0,'NSET',OCVNSET
(A8,F8.0,2E24.16,A8,E24.16)
*VWRITE,'P10N16',0,0,0,'LSTP',OCVLSTP
(A8,F8.0,2E24.16,A8,E24.16)
*VWRITE,'P10N16',0,0,0,'SBST',OCVSBST
(A8,F8.0,2E24.16,A8,E24.16)
*VWRITE,'P10N16',0,0,0,'PRE_N',OCVPREN
(A8,F8.0,2E24.16,A8,E24.16)
*VWRITE,'P10N16',0,0,0,'PRE_E',OCVPREE
(A8,F8.0,2E24.16,A8,E24.16)
*VWRITE,'P10N16',0,0,0,'LIST_N',OCVLISTN
(A8,F8.0,2E24.16,A8,E24.16)
*VWRITE,'P10N16',0,0,0,'LIST_E',OCVLISTE
(A8,F8.0,2E24.16,A8,E24.16)
*VWRITE,'P10N16',0,0,0,'POST_N',OCVPOSTN
(A8,F8.0,2E24.16,A8,E24.16)
*VWRITE,'P10N16',0,0,0,'POST_E',OCVPOSTE
(A8,F8.0,2E24.16,A8,E24.16)
*CFCLOS
*CFOPEN,precision_witness,txt
OCVWIT=1.234567890123456
*VWRITE,'P10N16',0,0,0,'WITNESS',OCVWIT
(A8,F8.0,2E24.16,A8,E24.16)
*CFCLOS
FINISH
