! Padeye (lifting-lug) screening FE — generated by digitalmodel.ansys.padeye
! Units: mm, N, MPa (plane stress with thickness)
! QUALIFICATION PENDING: generation establishes no solved stress or mesh convergence.
! Thickness/hole diameter t/D = 0.1; plane-stress idealisation.
! No pin/contact or 3D qualification is established by this screening model.
FINISH
/CLEAR,NOSTART
/TITLE,Padeye screening: t=8.0mm hole=80.0mm
/UNITS,MPA
/PREP7

! --- material (linear elastic steel) ---
MP,EX,1,205000.0
MP,PRXY,1,0.3

! --- element: PLANE182, plane stress with thickness ---
ET,1,PLANE182
KEYOPT,1,3,3            ! plane stress with thickness
R,1,8.0  ! plate thickness (real constant)

! --- geometry: main plate minus pin hole ---
BLC4,0,0,400.0,300.0   ! area 1 = plate
CYL4,200.0,220.0,40.0                                       ! area 2 = hole disk
ASBA,1,2               ! subtract hole -> plate-with-hole area

! --- mesh ---
TYPE,1
MAT,1
REAL,1
ESIZE,10.0
AMESH,ALL

! --- boundary conditions: fix the weld base (bottom edge y=0) ---
NSEL,S,LOC,Y,0
D,ALL,ALL,0
ALLSEL,ALL

! --- load: sling bearing force on the upper hole arc ---
LOCAL,11,1,200.0,220.0,0     ! cylindrical CS at hole centre
CSYS,11
NSEL,S,LOC,X,39.2,40.8   ! nodes on the hole edge (radius ~ r)
NSEL,R,LOC,Y,0,180                    ! upper semicircle (loaded arc)
CSYS,0
*GET,nload,NODE,0,COUNT
fx_n = 0.0 / nload
fy_n = 50000.0 / nload
F,ALL,FX,fx_n
F,ALL,FY,fy_n
ALLSEL,ALL

! --- solve (static structural) ---
/SOLU
ANTYPE,STATIC
SOLVE
FINISH

! --- post: peak von Mises + unity check ---
/POST1
SET,LAST
/GRAPHICS,FULL
AVPRIN,0
CSYS,0
RSYS,0
ALLSEL,ALL
*GET,mesh_nodes,NODE,0,COUNT
*GET,mesh_elements,ELEM,0,COUNT
NSORT,S,EQV
*GET,smax,SORT,0,MAX
*GET,peak_node,SORT,0,IMAX
*GET,peak_x,NODE,peak_node,LOC,X
*GET,peak_y,NODE,peak_node,LOC,Y
*GET,peak_z,NODE,peak_node,LOC,Z
allow = 212.57485029940122
uc = smax / allow
mesh_size = 10.0
! Retain nodal stress listing for independent peak extraction checks.
PRNSOL,S,PRIN

! --- equilibrium: support nodes only, all structural elements retained ---
! FSUM is an element-force sum, not the signed restrained-node reaction.
! Retain both; sum NODE RF explicitly for reaction + applied load balance.
ALLSEL,ALL
NSEL,S,LOC,Y,0
FSUM
*GET,fsum_fx,FSUM,0,ITEM,FX
*GET,fsum_fy,FSUM,0,ITEM,FY
*GET,support_count,NODE,0,COUNT
*GET,support_node,NODE,0,NUM,MIN
rfx = 0
rfy = 0
*DO,support_i,1,support_count
*GET,node_rfx,NODE,support_node,RF,FX
*GET,node_rfy,NODE,support_node,RF,FY
rfx = rfx + node_rfx
rfy = rfy + node_rfy
support_node = NDNEXT(support_node)
*ENDDO
! Retain nodal reactions independently of FSUM for sign/resultant checks.
PRRSOL,F
ALLSEL,ALL
applied_fx = 0.0
applied_fy = 50000.0
balance_n = SQRT((rfx + applied_fx)**2 + (rfy + applied_fy)**2)
/COM,============================================================
/COM,PADEYE SCREENING RESULT
*MSG,INFO,smax,allow,uc
peak von Mises = %G MPa ; allowable = %G MPa ; UC = %G
/COM,============================================================
! numeric digest for the postprocessor (small, returnable)
*CFOPEN,padeye_result,csv
*VWRITE,smax,allow,uc
('max_seqv_mpa,',F12.4,',allowable_mpa,',F12.4,',uc,',F10.5)
*VWRITE,peak_node
('peak_node,',F12.0)
*VWRITE,peak_x,peak_y,peak_z
('peak_x_mm,',E20.12,',peak_y_mm,',E20.12,',peak_z_mm,',E20.12)
*VWRITE,mesh_size
('mesh_size_mm,',E20.12)
*VWRITE,nload
('loaded_node_count,',F12.0)
*VWRITE,mesh_nodes,mesh_elements
('mesh_node_count,',F12.0,',mesh_element_count,',F12.0)
*VWRITE,applied_fx,applied_fy
('applied_fx_n,',E20.12,',applied_fy_n,',E20.12)
*VWRITE,rfx,rfy
('reaction_fx_n,',E20.12,',reaction_fy_n,',E20.12)
*VWRITE,fsum_fx,fsum_fy
('fsum_fx_n,',E20.12,',fsum_fy_n,',E20.12)
*VWRITE,balance_n
('force_residual_n,',E20.12)
*CFCLOS
FINISH
